<?xml version="1.0"?>
<?xml-stylesheet type="text/xsl" href="http://jsbsim.sourceforge.net/JSBSim.xsl"?>
<fdm_config name="Draken J35F" version="2.0" release="ALPHA"
   xmlns:xsi="http://www.w3.org/2001/XMLSchema-instance"
   xsi:noNamespaceSchemaLocation="http://jsbsim.sourceforge.net/JSBSim.xsd">

 <fileheader>
  <author> Aeromatic v 0.95 </author>
  <filecreationdate>2013-01-05</filecreationdate>
  <version>$Revision: 1.15 $</version>
  <description> Models a Draken J35F. </description>
 </fileheader>

<!--
  File:     Draken J35F.xml
  Inputs:
    name:          Draken J35F
    type:          single-engine transonic/supersonic fighter
    max weight:    26260.12 lb
    wing span:     30.8414 ft
    length:        50.33054 ft
    wing area:     527.483089 sq-ft
    gear type:     tricycle
    retractable?:  yes
    # engines:     1
    engine type:   piston
    engine layout: aft fuselage
    yaw damper?    yes
  Outputs:
    wing loading:  49.59 lb/sq-ft
    payload:       5902.9 lbs
    CL-alpha:      3.5 per radian
    CL-0:          0.08
    CL-max:        1
    CD-0:          0.021
    K:             0.12

-->

 <metrics>
   <wingarea  unit="FT2">  527.48 </wingarea>
   <wingspan  unit="FT" >   30.84 </wingspan>
   <wing_incidence>        0.0733 </wing_incidence>
   <chord     unit="FT" >   17.10 </chord>
   <htailarea unit="FT2">   0.00 </htailarea><!-- 96.88 -->
   <htailarm  unit="FT" >   11.8 </htailarm>
   <vtailarea unit="FT2">   48.5 </vtailarea>
   <vtailarm  unit="FT" >   12.5 </vtailarm>
   <location name="AERORP" unit="IN">
     <x> 313.0 </x> <!-- 10000 mm from datum 2049 mm in front of nose -->
     <y>   0.00 </y>
     <z>  20.00 </z>
   </location>
   <location name="EYEPOINT" unit="IN">
     <x> 133.0 </x><!-- 130.00 -->
     <y>   0.00 </y>
     <z>  35.00 </z>
   </location>
   <location name="VRP" unit="IN">
     <x>267.0</x>
     <y>0.0</y>
     <z>0.0</z>
   </location>
 </metrics>

 <mass_balance>
   <ixx unit="SLUG*FT2">     12571 </ixx>
   <iyy unit="SLUG*FT2">     56332 </iyy>
   <izz unit="SLUG*FT2">     47820 </izz>
   <emptywt unit="LBS" >     18100 </emptywt> <!-- incl. pilot and akan -->
   <location name="CG" unit="IN">
     <x> 315.8 </x> <!-- 10072 mm from datum 2049 mm in front of nose -->
     <y>   0.00 </y>
     <z> 12.0 </z>
   </location>

   <pointmass name="DroptankL">
    <weight unit="LBS">100</weight>
    <location name="POINTMASS" unit="IN">
      <x> 304 </x>
      <y> -24.00 </y>
      <z> -22.4 </z>
    </location>
  </pointmass>

   <pointmass name="DroptankR">
    <weight unit="LBS">100</weight>
    <location name="POINTMASS" unit="IN">
      <x> 304 </x>
      <y>  24.00 </y>
      <z> -22.4 </z>
    </location>
  </pointmass>

 </mass_balance>

 <ground_reactions>

  <contact type="BOGEY" name="NOSE">
   <location unit="IN">
     <x>  179 </x>
     <y>   0.00 </y>
     <z> -56.2 </z> <!-- 2.7 in for compression empty weight-->
   </location>
   <static_friction>  0.80 </static_friction>
   <dynamic_friction> 0.50 </dynamic_friction>
   <rolling_friction> 0.02 </rolling_friction>
   <spring_coeff unit="LBS/FT">       9790.00 </spring_coeff>
   <damping_coeff unit="LBS/FT/SEC"> 13080.06 </damping_coeff>
   <max_steer unit="DEG"> 22.00 </max_steer>
   <brake_group>NONE</brake_group>
   <retractable>1</retractable>
  </contact>

  <contact type="BOGEY" name="LEFT_MAIN">
   <location unit="IN">
     <x> 336.0 </x>
     <y> -52.4 </y>
     <z> -47.0 </z> <!-- 2.7 in for compression empty weight-->
   </location>
   <static_friction>  0.80 </static_friction>
   <dynamic_friction> 0.50 </dynamic_friction>
   <rolling_friction> 0.02 </rolling_friction>
   <spring_coeff unit="LBS/FT">      36160.12 </spring_coeff>
   <damping_coeff unit="LBS/FT/SEC"> 13080.06 </damping_coeff>
   <max_steer unit="DEG">0</max_steer>
   <brake_group>LEFT</brake_group>
   <retractable>1</retractable>
  </contact>

  <contact type="BOGEY" name="RIGHT_MAIN">
   <location unit="IN">
     <x> 336.0 </x>
     <y>  52.4 </y>
     <z> -47.0 </z> <!-- 2.7 in for compression empty weight-->
   </location>
   <static_friction>  0.80 </static_friction>
   <dynamic_friction> 0.50 </dynamic_friction>
   <rolling_friction> 0.02 </rolling_friction>
   <spring_coeff unit="LBS/FT">      36160.12 </spring_coeff>
   <damping_coeff unit="LBS/FT/SEC"> 13080.06 </damping_coeff>
   <max_steer unit="DEG">0</max_steer>
   <brake_group>RIGHT</brake_group>
   <retractable>1</retractable>
  </contact>

  <contact type="BOGEY" name="TAIL_WHEEL">
   <location unit="IN">
     <x> 492.0 </x>
     <y>  0.0 </y>
     <z> -28.7 </z>
   </location>
   <static_friction>  0.80 </static_friction>
   <dynamic_friction> 0.50 </dynamic_friction>
   <rolling_friction> 0.02 </rolling_friction>
   <spring_coeff unit="LBS/FT">      18080.0 </spring_coeff>
   <damping_coeff unit="LBS/FT/SEC"> 13080.06 </damping_coeff>
   <max_steer unit="DEG">0</max_steer>
   <brake_group>RIGHT</brake_group>
   <retractable>1</retractable>
</contact>


  <contact type="STRUCTURE" name="LEFT_WING">
    <location unit="IN">
     <x> 486.0 </x>
     <y> -185.0 </y>
     <z> 0.0 </z>
    </location>
    <static_friction>  1.00 </static_friction>
    <dynamic_friction> 1.00 </dynamic_friction>
    <spring_coeff unit="LBS/FT">      26160.12 </spring_coeff>
    <damping_coeff unit="LBS/FT/SEC"> 26160.12 </damping_coeff>
  </contact>

  <contact type="STRUCTURE" name="RIGHT_WING">
    <location unit="IN">
     <x> 486.0 </x>
     <y>  185.0 </y>
     <z> 0.0 </z>
    </location>
    <static_friction>  1.00 </static_friction>
    <dynamic_friction> 1.00 </dynamic_friction>
    <spring_coeff unit="LBS/FT">      26160.12 </spring_coeff>
    <damping_coeff unit="LBS/FT/SEC"> 26160.12 </damping_coeff>
  </contact>

  <contact type="STRUCTURE" name="NOSE">
    <location unit="IN">
     <x> 0.0 </x>
     <y> 0.0 </y>
     <z> 0.0 </z>
    </location>
    <static_friction>  1.00 </static_friction>
    <dynamic_friction> 1.00 </dynamic_friction>
    <spring_coeff unit="LBS/FT">      26160.12 </spring_coeff>
    <damping_coeff unit="LBS/FT/SEC"> 26160.12 </damping_coeff>
  </contact>

  <contact type="STRUCTURE" name="NOSE_BOTTOM">
    <location unit="IN">
     <x> 100.0 </x>
     <y> 0.0 </y>
     <z> -11.0 </z>
    </location>
    <static_friction>  0.60 </static_friction>
    <dynamic_friction> 0.40 </dynamic_friction>
    <spring_coeff unit="LBS/FT">      26160.12 </spring_coeff>
    <damping_coeff unit="LBS/FT/SEC"> 26160.12 </damping_coeff>
  </contact>

  <contact type="STRUCTURE" name="TAIL_BOTTOM">
    <location unit="IN">
     <x> 500.0 </x>
     <y> 0.0 </y>
     <z> -11.5 </z>
    </location>
    <static_friction>  0.60 </static_friction>
    <dynamic_friction> 0.40 </dynamic_friction>
    <spring_coeff unit="LBS/FT">      26160.12 </spring_coeff>
    <damping_coeff unit="LBS/FT/SEC"> 26160.12 </damping_coeff>
  </contact>

  <contact type="STRUCTURE" name="TAIL">
    <location unit="IN">
     <x> 578.0 </x>
     <y> 0.0 </y>
     <z> -6.5 </z>
    </location>
    <static_friction>  1.00 </static_friction>
    <dynamic_friction> 1.00 </dynamic_friction>
    <spring_coeff unit="LBS/FT">      26160.12 </spring_coeff>
    <damping_coeff unit="LBS/FT/SEC"> 26160.12 </damping_coeff>
  </contact>

 </ground_reactions>

 <propulsion>

   <engine file="TLSvenskaFlygmotorRM6CTyp66">
    <location unit="IN">
      <x> 543.97 </x>
      <y>   0.00 </y>
      <z>   15.00 </z> <!-- 0 -->
    </location>
    <orient unit="DEG">
      <pitch> 0.00 </pitch>
      <roll>  0.00 </roll>
      <yaw>   0.00 </yaw>
    </orient>
    <feed>4</feed>
    <feed>5</feed>
    <thruster file="direct">
     <sense> 1 </sense>
     <location unit="IN">
       <x> 543.97 </x>
       <y>   0.00 </y>
       <z>   15.00 </z> <!-- 0 -->
     </location>
     <orient unit="DEG">
       <pitch> 0.00 </pitch>
       <roll>  0.00 </roll>
       <yaw>   0.00 </yaw>
     </orient>
    </thruster>
  </engine>

  <tank type="FUEL" number="0">
     <location unit="IN">
       <x> 265.7 </x>
       <y>   0.00 </y>
       <z> 0 </z> <!-- -5.11 -->
     </location>
     <capacity unit="LBS"> 2420.00 </capacity>
     <contents unit="LBS"> 2420.00 </contents>
     <priority> 0 </priority>
  </tank>

  <tank type="FUEL" number="1">
     <location unit="IN">
       <x> 304.0 </x>
       <y>   -24.00 </y>
       <z> -22.4 </z>
     </location>
     <capacity unit="LBS"> 948.00 </capacity>
     <contents unit="LBS"> 948.00 </contents>
     <priority> 0 </priority>
  </tank>

    <tank type="FUEL" number="2">
     <location unit="IN">
       <x> 304.0 </x>
       <y>   24.00 </y>
       <z> -22.4 </z>
     </location>
     <capacity unit="LBS"> 948.00 </capacity>
     <contents unit="LBS"> 948.00 </contents>
     <priority> 0 </priority>
  </tank>

  <tank type="FUEL" number="3">
     <location unit="IN">
       <x> 365.7 </x>
       <y>   0.00 </y>
       <z> 0 </z> <!-- -5.11 -->
     </location>
     <capacity unit="LBS"> 2420.00 </capacity>
     <contents unit="LBS"> 2420.00 </contents>
     <priority> 0 </priority>
  </tank>

  <!-- Collector tanks: no 4 for tank 0 and 1, no 5 for tank 2 and 3 -->
  <!-- priority is initially 0 but becomes 1 when the fuel pump is switched on, see SaabJ35F.nas -->
  <tank type="FUEL" number="4">
     <location unit="IN">
       <x> 315.8 </x>
       <y>  -0.5 </y>
       <z> 0 </z> <!-- -5.11 -->
     </location>
     <capacity unit="LBS"> 130.00 </capacity>
     <contents unit="LBS"> 130.00 </contents>
     <priority> 0 </priority>
  </tank>

  <tank type="FUEL" number="5">
     <location unit="IN">
       <x> 315.8 </x>
       <y>   0.5 </y>
       <z> 0 </z> <!-- -5.11 -->
     </location>
     <capacity unit="LBS"> 130.00 </capacity>
     <contents unit="LBS"> 130.00 </contents>
     <priority> 0 </priority>
  </tank>

 </propulsion>

 <system file="fuel"/>

 <system file="hydraulic"/>

 <flight_control name="FCS: Draken J35F">

  <function name="fcs/qbar-hydr-quot">
    <description>effect from dynamic pressure and hydraulic pressure combined</description>
    <quotient>
      <property>aero/qbar-psf</property>
      <property>systems/hydraulic/fsc-force-norm</property>
    </quotient>
  </function>

  <function name="fcs/qbar-hydI-quot">
    <description>effect from dynamic pressure and hydraulic pressure combined</description>
    <quotient>
      <property>aero/qbar-psf</property>
      <property>systems/hydraulic/hydI-force-norm</property>
    </quotient>
  </function>

  <function name="fcs/sp-drag-effect">
    <description>Effect on max deflection of speedbrakes due to dragforces</description>
    <product>
      <table>
        <independentVar>fcs/qbar-hydI-quot</independentVar>
        <tableData>
          0.0 1.0
          600  1.0
          900  0.8
         1000  0.4
         4000  0.1
        </tableData>
      </table>
    </product>
  </function>


  <function name="fcs/rudder-speed-effect">
    <description>Effect on max deflection of rudder due to dynamic forces</description>
    <product>
      <table>
        <independentVar>fcs/qbar-hydr-quot</independentVar>
        <tableData>
          0.0 1.0
          100  1.0
          400  0.8
          700  0.6
         1000  0.4
         1300  0.2
         4000  0.1
        </tableData>
      </table>
      <!-- min pressure to move rudder -->
      <min>
        <property>systems/hydraulic/fsc-force-norm</property>
        <value>0.4</value>
      </min>
      <value>2.5</value>
    </product>
  </function>


  <channel name="Power">

   <scheduled_gain name="Afterburner valve">
      <input>fcs/throttle-cmd-norm</input>
      <table>
        <independentVar lookup="row">propulsion/afterburner-pump</independentVar>
         <tableData>
            0     0.98
            1     1.00
         </tableData>
      </table>
      <output>fcs/throttle-pos-norm</output>
   </scheduled_gain>

  </channel>

  <property value="1">fcs/pitch-damper-enable</property>

  <channel name="Pitch">

   <scheduled_gain name="pitch-damper-rate">
      <input>velocities/q-aero-rad_sec</input>
      <table>
        <independentVar lookup="row">velocities/ve-kts</independentVar>
         <tableData>
             0     0.0
           100     0.70
           300     0.50
           500     0.30
         </tableData>
      </table>
      <gain>fcs/pitch-damper-enable</gain>
   </scheduled_gain>

<!-- No hydraulics -->
    <fcs_function name="fcs/elevator-cmd-hyd">
      <function>
        <product>
          <max>
            <difference>
              <value>0.2</value>
              <property>systems/hydraulic/fsc-force-norm</property>
            </difference>
            <value>0</value>
          </max>
          <value>10</value>
          <table>
            <independentVar lookup="row">velocities/ve-kts</independentVar>
            <tableData>
             0     1
            10     0.70
            20     0.00
            </tableData>
          </table>
        </product>
      </function>
    </fcs_function>

<!-- Draken has non-linear responce to elevator-control -->
    <fcs_function name="fcs/elevator-pos-calc">
      <function>
        <product>
          <sum>
            <property>fcs/pitch-trim-cmd-norm</property>
            <property>fcs/pitch-damper-rate</property>
            <property>fcs/elevator-cmd-hyd</property>
            <table>
              <independentVar>fcs/elevator-cmd-norm</independentVar>
              <tableData>
              -1.0   -1.0
              -0.4   -0.2
              -0.23  -0.1
               0.00   0.0
               0.1    0.08
               0.17   0.16
               0.50   0.4
              </tableData>
            </table>
          </sum>
            <!-- Limit due to max hydralic moment -->
            <table>
              <independentVar>fcs/qbar-hydr-quot</independentVar>
              <tableData>
                   0    1.0
                 780    0.7
                 900    0.4
                1600    0.3
              </tableData>
            </table>
            <!-- Transonic range -->
            <table>
              <independentVar lookup="row">velocities/mach</independentVar>
              <tableData>
                0.00      1.0
                0.95      1.0
                0.97      0.6
                1.03      0.6
                1.05      1.0
                2.50      1.0
              </tableData>
            </table>
        </product>
      </function>
      <clipto>
        <min>-1.0</min>
        <max>0.4</max>
      </clipto>
      <output>fcs/pitch-trim-sum</output>
    </fcs_function>


   <aerosurface_scale name="elevator control">
      <input>fcs/pitch-trim-sum</input>
      <domain>
        <min> -1 </min>
        <max>  1 </max>
      </domain>
      <range>
        <min> -0.44 </min>
        <max>  0.44 </max>
      </range>
      <output>fcs/elevator-pos-rad</output>
   </aerosurface_scale>

   <aerosurface_scale name="elevator normalization">
      <input>fcs/elevator-pos-rad</input>
      <domain>
        <min> -0.44 </min>
        <max>  0.44 </max>
      </domain>
      <range>
        <min> -1 </min>
        <max>  1 </max>
      </range>
      <output>fcs/elevator-pos-norm</output>
   </aerosurface_scale>

  </channel>

  <property value="0">fcs/elevon-deflection-max</property>

  <channel name="Roll">

   <summer name="Roll Trim Sum">
      <input>fcs/aileron-cmd-norm</input>
      <input>fcs/roll-trim-cmd-norm</input>
      <clipto>
        <min> -1 </min>
        <max>  1 </max>
      </clipto>
   </summer>

<!-- Calculating the deflection left for aileron effect -->
    <fcs_function name="fcs/elevon-defl-max">
      <function>
        <min>
          <difference>
            <value>0.4</value>
            <property>fcs/elevator-pos-norm</property>
          </difference>
          <difference>
            <property>fcs/elevator-pos-norm</property>
            <value>-1</value>
          </difference>
        </min>
      </function>
    </fcs_function>

    <pure_gain name="Cliped deflection norm">
      <input>fcs/roll-trim-sum</input>
      <gain>1</gain>
      <clipto>
        <min>-fcs/elevon-defl-max</min>
        <max>fcs/elevon-defl-max</max>
      </clipto>
   </pure_gain>


   <aerosurface_scale name="Left Aileron Control">
      <input>fcs/cliped-deflection-norm</input>
      <range>
        <min> -0.22 </min>
        <max>  0.22 </max>
      </range>
   </aerosurface_scale>

   <summer name="Left elevon">
     <input>fcs/left-aileron-control</input>
     <input>fcs/elevator-pos-rad</input>
     <output>fcs/left-aileron-pos-rad</output>
   </summer>

   <aerosurface_scale name="Right Aileron Control">
      <input>-fcs/cliped-deflection-norm</input>
      <range>
        <min> -0.22 </min>
        <max>  0.22 </max>
      </range>
   </aerosurface_scale>

   <summer name="Right elevon">
     <input>fcs/right-aileron-control</input>
     <input>fcs/elevator-pos-rad</input>
     <output>fcs/right-aileron-pos-rad</output>
   </summer>

   <aerosurface_scale name="left aileron normalization">
      <input>fcs/left-aileron-pos-rad</input>
      <domain>
        <min> -0.44 </min>
        <max>  0.44 </max>
      </domain>
      <range>
        <min> -1 </min>
        <max>  1 </max>
      </range>
      <output>fcs/left-aileron-pos-norm</output>
   </aerosurface_scale>

   <aerosurface_scale name="right aileron normalization">
      <input>fcs/right-aileron-pos-rad</input>
      <domain>
        <min> -0.44 </min>
        <max>  0.44 </max>
      </domain>
      <range>
        <min> -1 </min>
        <max>  1 </max>
      </range>
      <output>fcs/right-aileron-pos-norm</output>
   </aerosurface_scale>

  </channel>

  <property value="1">fcs/yaw-damper-enable</property>
  <channel name="Yaw">

   <summer name="Rudder Command Sum">
      <input>fcs/rudder-cmd-norm</input>
      <input>fcs/yaw-trim-cmd-norm</input>
      <clipto>
        <min> -1 </min>
        <max>  1 </max>
      </clipto>
   </summer>

   <scheduled_gain name="Yaw Damper Rate">
      <input>velocities/r-aero-rad_sec</input>
      <table>
        <independentVar lookup="row">velocities/ve-kts</independentVar>
         <tableData>
            30     0.00
            60     2.00
         </tableData>
      </table>
      <gain>fcs/yaw-damper-enable</gain>
   </scheduled_gain>

   <summer name="Rudder Sum">
      <input>fcs/rudder-command-sum</input>
      <input>fcs/yaw-damper-rate</input>
      <clipto>
        <min> -1.1 </min>
        <max>  1.1 </max>
      </clipto>
   </summer>

   <aerosurface_scale name="Rudder Control">
      <input>fcs/rudder-sum</input>
      <domain>
        <min> -1.1 </min>
        <max>  1.1 </max>
      </domain>
      <range>
        <min> -0.35 </min>
        <max>  0.35 </max>
      </range>
      <gain>fcs/rudder-speed-effect</gain>
      <output>fcs/rudder-pos-rad</output>
   </aerosurface_scale>

   <aerosurface_scale name="rudder normalization">
      <input>fcs/rudder-pos-rad</input>
      <domain>
        <min> -0.35 </min>
        <max>  0.35 </max>
      </domain>
      <range>
        <min> -1 </min>
        <max>  1 </max>
      </range>
      <output>fcs/rudder-pos-norm</output>
   </aerosurface_scale>

  </channel>

  <channel name="Landing Gear">
   <kinematic name="Gear Control">
     <input>gear/gear-cmd-norm</input>
     <traverse>
       <setting>
          <position> 0 </position>
          <time>     0 </time>
       </setting>
       <setting>
          <position> 1 </position>
          <time>     5 </time>
       </setting>
     </traverse>
     <output>gear/gear-pos-norm</output>
   </kinematic>

  </channel>

  <channel name="Speedbrake">
   <kinematic name="Speedbrake Control">
     <input>fcs/speedbrake-cmd-norm</input>
     <traverse>
       <setting>
          <position> 0 </position>
          <time>     0 </time>
       </setting>
       <setting>
          <position> 1 </position>
          <time>     1 </time>
       </setting>
     </traverse>
     <output>fcs/speedbrake-pos-norm</output>
   </kinematic>

  </channel>


  <property value="0">fcs/drag-chute-deployed</property>
  <property value="1">fcs/drag-chute-serviceable</property>

  <channel name="Dragchute">
<!-- Drag Chute test for too high drag -->
    <switch>
      <default value="fcs/drag-chute-serviceable"/>
      <test locic="AND" value="0">
        aero/qbar-psf GE 206 <!-- Gives a force of 20 000 N -->
        fcs/drag-chute-deployed EQ 1
      </test>
      <output>fcs/drag-chute-serviceable</output>
    </switch>

  </channel>

 </flight_control>

    <!-- **************** AERODYNAMICS ********************* -->

    <!-- "Aerodynamics of the Viggen 37 Aircraft NASA" TM-88403
         includes J35 data -->

 <aerodynamics>


        <function name="aero/function/kCLge">
            <description>Change_in_lift_due_to_ground_effect</description>
            <product>
                  <table>
                      <independentVar>aero/h_b-mac-ft</independentVar>
                      <tableData>
                          0.0000  1.2290
                          0.1000  1.2040
                          0.1500  1.1460
                          0.2000  1.1240
                          0.3000  1.1050
                          0.4000  1.0410
                          0.5000  1.0340
                          0.6000  1.0190
                          0.7000  1.0080
                          0.8000  1.0030
                          0.9000  1.0010
                          1.0000  1.0000
                          1.1000  1.0000
                      </tableData>
                  </table>
            </product>
        </function>

        <function name="aero/function/CA-1">
           <description>Quotient of inlet velocit and air velocity minus one</description>
           <min>
             <sum>
               <quotient>
                 <product>
                   <property>propulsion/engine/n1</property>
                   <value>4</value> <!-- Approx 400 ft/s at max RPM -->
                 </product>
                 <property>velocities/u-aero-fps</property>
               </quotient>
               <value>-1.0</value>
             </sum>
             <value>9</value> <!-- Avoids unrealistic effects at very low speeds  -->
           </min>
         </function>

  <axis name="LIFT">

    <function name="aero/force/Lift_alpha">
      <description>Lift due to alpha</description>
      <product>
          <property>aero/qbarUW-psf</property>
          <property>metrics/Sw-sqft</property>
          <property>aero/function/kCLge</property>
          <table>
            <independentVar lookup="row">aero/alpha-rad</independentVar>
            <tableData>
              -0.35 -0.70
              -0.17 -0.30
               0.00  0.07
               0.17  0.42
               0.44  1.05
               0.61  1.33
               0.79  1.17
               0.91  0.75
               1.8   0.0
            </tableData>
          </table>
      </product>
    </function>

    <!--function name="aero/force/Lift_speedbrake">
       <description>Delta Lift due to speedbrake</description>
       <product>
           <property>aero/qbar-psf</property>
           <property>metrics/Sw-sqft</property>
           <property>fcs/speedbrake-pos-norm</property>
           <value>0</value>
       </product>
    </function -->

    <function name="aero/force/Lift_elevator">
       <description>Lift due to Elevator Deflection</description>
       <product>
           <property>aero/qbarUW-psf</property>
           <property>metrics/Sw-sqft</property>
           <property>fcs/elevator-pos-rad</property>
           <value>0.40</value>
<!-- From: Aerodynamic analysis of J35 Draken Alexis RIGALDO -->
          <table>
            <independentVar lookup="row">aero/alpha-rad</independentVar>
            <tableData>
              0.0     1.0
              0.24    1.0
              0.35    0.8
              0.5     0.6
              0.7     0.4
              0.85    0.0
              1.0     0.15
              1.3     0.0
              1.7     0.0
            </tableData>
          </table>
       </product>
    </function>

  </axis>

  <axis name="DRAG">

    <function name="aero/force/Drag">
       <description>Drag</description>
       <product>
          <property>aero/qbarUW-psf</property>
          <property>metrics/Sw-sqft</property>
          <table>
            <independentVar lookup="row">aero/alpha-rad</independentVar>
            <tableData>
             -1.57    1.50
             -0.35    0.18
             -0.26    0.087
             -0.17    0.032
             -0.09    0.018
             -0.04    0.016
              0.00    0.018
              0.05    0.026
              0.17    0.085
              0.26    0.21
              0.35    0.33
              0.52    0.74
              0.70    1.0
              1.57    1.500
            </tableData>
          </table>
       </product>
    </function>

    <function name="aero/force/Drag_mach">
       <description>Drag due to mach</description>
        <product>
          <property>aero/qbarUW-psf</property>
          <property>metrics/Sw-sqft</property>
          <table>
            <independentVar lookup="row">velocities/mach</independentVar>
            <tableData>
                0.00      0.000
                0.92      0.000
                1.00      0.006
                1.10      0.003
                1.80      0.003
            </tableData>
          </table>
        </product>
    </function>

    <function name="aero/force/Drag_gear">
       <description>Drag due to gear</description>
         <product>
           <property>aero/qbarUW-psf</property>
           <property>gear/gear-pos-norm</property>
           <value>11</value>
         </product>
    </function>

    <function name="aero/force/Drag_speedbrake">
       <description>Drag due to speedbrakes</description>
         <product>
           <property>aero/qbar-psf</property>
           <property>metrics/Sw-sqft</property>
           <property>fcs/speedbrake-pos-norm</property>
           <property>fcs/sp-drag-effect</property>
           <value>0.021</value>
         </product>
    </function>

    <function name="aero/force/Drag_beta">
       <description>Drag due to sideslip</description>
       <product>
          <property>aero/qbarUV-psf</property>
          <property>metrics/Sw-sqft</property>
          <table>
            <independentVar lookup="row">aero/beta-rad</independentVar>
            <tableData>
              -1.57    1.230
              -0.26    0.050
               0.00    0.000
               0.26    0.050
               1.57    1.230
            </tableData>
          </table>
       </product>
    </function>

    <function name="aero/force/Drag_elevator">
       <description>Drag due to Elevator Deflection</description>
       <product>
           <property>aero/qbar-psf</property>
           <property>metrics/Sw-sqft</property>
           <abs><property>fcs/elevator-pos-norm</property></abs>
           <value>0.015</value>
       </product>
    </function>

  <function name="aero/force/Drag_Droptanks">
       <description>Drag due to Droptanks</description>
       <product>
           <property>aero/qbar-psf</property>
           <property>/consumables/droptanks</property>
           <value>0.42</value>
       </product>
    </function>

  </axis>

  <axis name="SIDE">

    <function name="aero/force/Side_beta">
       <description>Side force due to beta</description>
       <product>
           <property>aero/qbar-psf</property>
           <property>metrics/Sw-sqft</property>
          <table>
            <independentVar lookup="row">aero/beta-rad</independentVar>
            <independentVar lookup="column">aero/alpha-rad </independentVar>
            <tableData>
                      -0.50   -0.17    0.0    0.26   0.50   0.70   1.00   1.70
              -1.57    0.50    0.60    0.60   0.60   0.50   0.40   0.30   0.20
              -0.26    0.05    0.15    0.12   0.10   0.13   0.13   0.02   0.02
               0.00    0.00    0.00    0.00   0.00   0.00   0.00   0.00   0.00
               0.26   -0.05   -0.15   -0.12  -0.10  -0.13  -0.13  -0.02  -0.02
               1.57   -0.50   -0.60   -0.60  -0.60  -0.50  -0.40  -0.30  -0.20
            </tableData>
          </table>
       </product>
    </function>

  </axis>

  <axis name="ROLL">

    <function name="aero/moment/Roll_beta">
       <description>Roll moment due to beta</description>
       <product>
           <property>aero/qbarUV-psf</property>
           <property>metrics/Sw-sqft</property>
           <property>metrics/bw-ft</property>
           <property>aero/function/kCLge</property>
           <property>aero/beta-rad</property>
          <table>
            <independentVar lookup="row">aero/alpha-rad</independentVar>
            <tableData>
              -0.17    0.04
               0.00    0.00
               0.08   -0.05
               0.17   -0.08
               0.26   -0.09
               0.42   -0.06
               0.60    0.03
               0.68    0.03
               0.77   -0.08
               1.00   -0.08
            </tableData>
          </table>
       </product>
    </function>

    <function name="aero/moment/Roll_damp">
       <description>Roll moment due to roll rate</description>
       <product>
           <property>aero/qbar-psf</property>
           <property>metrics/Sw-sqft</property>
           <property>metrics/bw-ft</property>
           <property>aero/bi2vel</property>
           <property>velocities/p-aero-rad_sec</property>
           <property>aero/function/kCLge</property>
          <table>
            <independentVar lookup="row">aero/alpha-rad</independentVar>
            <tableData>
              -0.17   -0.15
               0.00   -0.15
               0.17   -0.17
               0.34   -0.20
               0.52   -0.35
               0.69   -0.30
               0.75   -0.15
               0.87   -0.20
               1.00   -0.10
            </tableData>
          </table>
       </product>
    </function>

    <function name="aero/moment/Roll_yaw">
       <description>Roll moment due to yaw rate</description>
       <product>
           <property>aero/qbar-psf</property>
           <property>metrics/Sw-sqft</property>
           <property>metrics/bw-ft</property>
           <property>aero/bi2vel</property>
           <property>velocities/r-aero-rad_sec</property>
          <table>
            <independentVar lookup="row">aero/alpha-rad</independentVar>
            <tableData>
              -0.17   -0.10
               0.00   -0.10
               0.17   -0.10
               0.34   -0.15
               0.52   -0.30
               0.69   -0.40
               0.75   -0.50
               0.87   -0.40
               1.00   -0.25
            </tableData>
          </table>
       </product>
    </function>

    <function name="aero/moment/Roll_aileron">
       <description>Roll moment due to aileron</description>
       <product>
          <property>aero/qbar-psf</property>
          <property>metrics/Sw-sqft</property>
          <property>metrics/bw-ft</property>
          <property>fcs/left-aileron-control</property>
          <table>
            <independentVar lookup="row">velocities/mach</independentVar>
            <tableData>
              0.0     0.11
              0.9     0.11
              1.1     0.07
              2.0     0.07
            </tableData>
          </table>
<!-- Stall lowering of efficency -->
          <table>
            <independentVar lookup="row">aero/alpha-rad</independentVar>
            <tableData>
              0.0     1.0
              0.24    1.0
              0.35    0.6
              0.8     0.15
              2.0     0.1
            </tableData>
          </table>
       </product>
    </function>

    <function name="aero/moment/Roll_rudder">
       <description>Roll moment due to rudder</description>
       <product>
           <property>aero/qbarUV-psf</property>
           <property>metrics/Sw-sqft</property>
           <property>metrics/bw-ft</property>
           <property>fcs/rudder-pos-rad</property>
          <table>
            <independentVar lookup="row">aero/alpha-rad</independentVar>
            <tableData>
             -0.17   1.5
              0.0    1.0
              0.37   0.0
              0.75  -0.9
              1.0	-2.0
              1.6   -0.0
            </tableData>
          </table>
           <value>0.03</value>
       </product>
    </function>

  </axis>

  <axis name="PITCH">

    <function name="aero/moment/Pitch_alpha">
       <description>Pitch moment due to alpha</description>
       <product>
           <property>aero/qbarUW-psf</property>
           <property>metrics/Sw-sqft</property>
           <property>metrics/cbarw-ft</property>
           <property>aero/function/kCLge</property>
	   <table>
            <independentVar lookup="row">aero/alpha-rad</independentVar>
            <tableData>
              -0.5    0.07
              -0.35   0.05
              -0.17   0.04
               0.0    0.0
               0.17  -0.04
               0.35  -0.07
               0.5   -0.08
               0.6   -0.065
               0.70  -0.025
               0.75   0.00
               0.82   0.02
               0.87   0.00
               1.0   -0.12
               1.7   -0.30
            </tableData>
           </table>
       </product>
    </function>

    <function name="aero/moment/Pitch_elevator">
       <description>Pitch moment due to elevator</description>
       <product>
          <property>aero/qbarUW-psf</property>
          <property>metrics/Sw-sqft</property>
          <property>metrics/cbarw-ft</property>
          <property>fcs/elevator-pos-rad</property>
          <table>
            <independentVar lookup="row">velocities/mach</independentVar>
            <tableData>
              0.0     -0.41
              0.9     -0.41
              1.1     -0.24
              2.0     -0.24
            </tableData>
          </table>
<!-- From: Aerodynamic analysis of J35 Draken Alexis RIGALDO -->
          <table>
            <independentVar lookup="row">aero/alpha-rad</independentVar>
            <tableData>
              0.0     1.0
              0.24    1.0
              0.35    0.8
              0.5     0.5
              0.7     0.2
              1.0     0.1
              1.7     0.1
            </tableData>
          </table>
       </product>
    </function>

    <function name="aero/moment/Pitch_damp">
       <description>Pitch moment due to pitch rate</description>
       <product>
           <property>aero/qbarUW-psf</property>
           <property>metrics/Sw-sqft</property>
           <property>metrics/cbarw-ft</property>
           <property>aero/ci2vel</property>
           <property>velocities/q-aero-rad_sec</property>
           <table>
            <independentVar lookup="row">aero/alpha-rad</independentVar>
            <tableData>
             -0.80   -0.6
             -0.40   -1.2
              0.40   -1.2
              0.80   -0.6
            </tableData>
          </table>
       </product>
    </function>

    <function name="aero/moment/Pitch_alphadot">
       <description>Pitch moment due to alpha rate</description>
       <product>
           <property>aero/qbarUW-psf</property>
           <property>metrics/Sw-sqft</property>
           <property>metrics/cbarw-ft</property>
           <property>aero/ci2vel</property>
           <property>aero/alphadot-rad_sec</property>
           <table>
            <independentVar lookup="row">aero/alpha-rad</independentVar>
            <tableData>
             -0.80    0.0
             -0.40   -0.5
              0.40   -0.5
              0.80    0.0
            </tableData>
          </table>
       </product>
    </function>

<!-- Pitch gear and droptanks not adjusted for alpha -->
    <function name="aero/moment/Pitch_gear">
       <description>Pitch moment due to gear</description>
       <product>
           <property>aero/qbar-psf</property>
           <property>gear/gear-pos-norm</property>
         <value>-21</value>
       </product>
    </function>

  <function name="aero/moment/Pitch_droptanks">
       <description>Pitch due to Droptanks</description>
       <product>
           <property>aero/qbar-psf</property>
           <property>/consumables/droptanks</property>
           <value>-0.84</value>
       </product>
    </function>

     <function name="aero/moment/Pitch_intake">
       <description>Pitch moment due to airflow in intake</description>
       <product>
         <property>aero/qbarUW-psf</property>
         <property>metrics/Sw-sqft</property>
         <property>metrics/cbarw-ft</property>
         <property>aero/alpha-rad</property>
         <property>aero/function/CA-1</property>
         <value>-0.05</value>
       </product>
    </function>
  </axis>

  <axis name="YAW">

    <!-- Incorrect? -->
    <function name="aero/moment/Yaw_beta">
       <description>Yaw moment due to beta</description>
       <product>
           <property>aero/qbar-psf</property>
           <property>metrics/Sw-sqft</property>
           <property>metrics/bw-ft</property>
           <table>
            <independentVar lookup="row">aero/beta-rad</independentVar>
            <independentVar lookup="column">aero/alpha-rad </independentVar>
            <tableData>
                      -0.50   -0.17    0.0    0.17   0.50   0.70
              -1.57   -0.04   -0.05   -0.06  -0.05  -0.04  -0.01
              -0.26   -0.01   -0.03   -0.04  -0.03  -0.01  -0.01
               0.00    0.00    0.00    0.00   0.00   0.00   0.00
               0.26    0.01    0.03    0.04   0.03   0.01   0.01
               1.57    0.50    0.05    0.06   0.05   0.04   0.01
            </tableData>
          </table>
       </product>
    </function>

    <function name="aero/moment/Yaw_damp">
       <description>Yaw moment due to yaw rate</description>
       <product>
         <property>aero/qbar-psf</property>
         <property>metrics/Sw-sqft</property>
         <property>metrics/bw-ft</property>
         <property>aero/bi2vel</property>
         <property>velocities/r-aero-rad_sec</property>
         <table>
           <independentVar lookup="row">aero/alpha-rad</independentVar>
             <tableData>
               -0.17   -0.20
                0.00    -0.20
                0.17    -0.20
                0.83    -0.10
                1.57    -0.05
            </tableData>
         </table>
       </product>
    </function>

    <function name="aero/moment/Yaw_rudder">
       <description>Yaw moment due to rudder</description>
       <product>
           <property>aero/qbarUV-psf</property>
           <property>metrics/Sw-sqft</property>
           <property>metrics/bw-ft</property>
           <table>
             <independentVar lookup="row">aero/beta-rad</independentVar>
             <independentVar lookup="column">fcs/rudder-pos-rad</independentVar>
             <tableData>
                       -0.35   -0.24   -0.17   -0.08   0.00   0.08   0.17   0.24   0.35
               -0.35    0.01    0.008   0.00   -0.003 -0.008 -0.015 -0.016 -0.02  -0.022
               -0.17    0.014   0.010   0.005  -0.001 -0.006 -0.012 -0.019 -0.023 -0.028
               -0.08    0.023   0.017   0.010   0.003 -0.003 -0.010 -0.017 -0.023 -0.030
                0.00    0.028   0.022   0.015   0.008  0.000 -0.008 -0.015 -0.022 -0.028
                0.08    0.030   0.023   0.017   0.010  0.003 -0.003 -0.010 -0.017 -0.023
                0.17    0.028   0.023   0.019   0.012  0.006  0.001 -0.005 -0.010 -0.014
                0.35    0.022   0.020   0.016   0.015  0.008  0.003  0.00  -0.008 -0.010
            </tableData>
         </table>
       </product>
    </function>

    <function name="aero/moment/Yaw_aileron">
       <description>Aileron gas</description>
       <product>
           <property>aero/qbar-psf</property>
           <property>metrics/Sw-sqft</property>
           <property>metrics/bw-ft</property>
           <property>fcs/left-aileron-control</property>
           <value>0.01</value>
       </product>
    </function>


  </axis>

 </aerodynamics>

 <external_reactions>

   <force name="parachute" frame="WIND">
      <function>
        <product>
          <property>aero/qbar-psf</property>
          <property>fcs/drag-chute-deployed</property>
          <property>fcs/drag-chute-serviceable</property>
          <value> 44 </value>  <!-- ACd -->
        </product>
      </function>
      <location unit="IN">
        <x>596</x>
        <y>0</y>
        <z>65</z>
      </location>
      <direction>
        <x>-1</x>
        <y>0</y>
        <z>0</z>
      </direction>
    </force>
 </external_reactions>

</fdm_config>
