<?xml version="1.0"?>
<!--
  File:     TLSvenskaFlygmotorRM6CTyp66.xml
  Author:   Aero-Matic v 0.8

  Inputs:
    name:           TLSvenskaFlygmotorRM6CTyp66
    type:           turbine
    thrust:         12701.2 lb
    augmented?      yes
    injected?       no
-->
<!-- http://flyginfoqr.se/Flygplan_J35%20Draken/Fpl35_Motor_A4b.pdf

  https://en.wikipedia.org/wiki/Rolls-Royce_Avon

-->

<turbine_engine name="TLSvenskaFlygmotorRM6CTyp66">
  <milthrust> 12859.0 </milthrust>
  <maxthrust> 19051.8 </maxthrust>
  <bypassratio>     0 </bypassratio>
  <tsfc>            0.93 </tsfc>
  <atsfc>           1.85 </atsfc>
  <bleed>           0.03</bleed>
  <idlen1>         30.0 </idlen1>
  <idlen2>         60.0 </idlen2>
  <maxn1>         100.0 </maxn1>
  <maxn2>         100.0 </maxn2>
  <augmented>         1 </augmented>
  <augmethod>         1 </augmethod>
  <injected>          0 </injected>

  <function name="IdleThrust">
   <table>
    <independentVar lookup="row">velocities/mach</independentVar>
    <independentVar lookup="column">atmosphere/density-altitude</independentVar>
                <tableData>
                         -10000     0     10000   20000   30000   40000   50000   90000
                     0.0  0.0430  0.0488  0.0528  0.0694  0.0899  0.1183  0.1467  0
                     0.2  0.0500  0.0501  0.0335  0.0544  0.0797  0.1049  0.1342  0
                     0.4  0.0040  0.0047  0.0020  0.0272  0.0595  0.0891  0.1203  0
                     0.6  0.0     0.0     0.0     0.0     0.0276  0.0718  0.1073  0
                     0.8  0.0     0.0     0.0     0.0     0.0474  0.0868  0.0900  0
                     1.0  0.0     0.0     0.0     0.0     0.0     0.0552  0.0800  0
                     1.2  0.0     0.0     0.0     0.0     0.0     0.0     0.0700  0
                     1.6  0.0     0.0     0.0     0.0     0.0     0.0     0.0     0
                </tableData>
   </table>
  </function>

  <function name="MilThrust">
   <table>
    <independentVar lookup="row">velocities/mach</independentVar>
    <independentVar lookup="column">atmosphere/density-altitude</independentVar>
                <tableData>
                           -10000       0   10000   20000   30000   40000   50000   90000
                      0.0  1.2600  1.0000  0.7400  0.5340  0.3720  0.2410  0.1490  0.0000
                      0.2  1.1460  0.9141  0.6821  0.4952  0.3474  0.2261  0.1399  0.0000
                      0.4  1.1009  0.8817  0.6625  0.4844  0.3418  0.2231  0.1388  0.0000
                      0.6  1.1054  0.8901  0.6748  0.4979  0.3538  0.2321  0.1441  0.0000
                      0.8  1.1506  0.9329  0.7152  0.5323  0.3814  0.2515  0.1555  0.0000
                      1.0  1.2229  1.0005  0.7781  0.5815  0.4243  0.2814  0.1742  0.0000
                      1.2  1.2949  1.0725  0.8502  0.6487  0.4752  0.3174  0.1962  0.0000
                      1.4  1.3560  1.1398  0.9238  0.7188  0.5342  0.3607  0.2237  0.0000
                      1.6  1.7032  1.4501  1.1972  0.9462  0.7110  0.4847  0.3012  0.0000
                      1.8  1.8123  1.5612  1.3081  1.0473  0.7943  0.5441  0.3392  0.0000
                      2.0  1.9214  1.6723  1.4193  1.1481  0.8774  0.6042  0.3771  0.0000
                </tableData>
   </table>
  </function>

  <function name="AugThrust">
   <table>
    <independentVar lookup="row">velocities/mach</independentVar>
    <independentVar lookup="column">atmosphere/density-altitude</independentVar>
                <tableData>
                           -10000       0   10000   20000   30000   40000   50000   90000
                     0.0    1.1816  1.0000  0.8184  0.6627  0.5280  0.3756  0.2327  0
                     0.2    1.1308  0.9599  0.7890  0.6406  0.5116  0.3645  0.2258  0
                     0.4    1.1150  0.9474  0.7798  0.6340  0.5070  0.3615  0.2240  0
                     0.6    1.1284  0.9589  0.7894  0.6420  0.5134  0.3661  0.2268  0
                     0.8    1.1707  0.9942  0.8177  0.6647  0.5309  0.3784  0.2345  0
                     1.0    1.2411  1.0529  0.8648  0.7017  0.5596  0.3983  0.2467  0
                     1.2    1.3287  1.1254  0.9221  0.7462  0.5936  0.4219  0.2614  0
                     1.4    1.4365  1.2149  0.9933  0.8021  0.6360  0.4509  0.2794  0
                     1.6    1.5711  1.3260  1.0809  0.8700  0.6874  0.4860  0.3011  0
                     1.8    1.7301  1.4579  1.1857  0.9512  0.7495  0.5289  0.3277  0
                     2.0    1.8314  1.5700  1.3086  1.0474  0.8216  0.5786  0.3585  0
                     2.2    1.9700  1.6900  1.4100  1.2400  0.9100  0.6359  0.3940  0
                     2.4    2.0700  1.8000  1.5300  1.3400  1.0000  0.7200  0.4600  0
                     2.6    2.2000  1.9200  1.6400  1.4400  1.1000  0.8000  0.5200  0
                </tableData>
   </table>
  </function>

</turbine_engine>
